# OpenSim document version 30000
Model FullBodyModel_MuscleActuatedLowerLimb_TorqueActuatedUpperBody:
  length_units: meters
  force_units: N
  gravity: 0 -9.80665 0
  credits:
    Arnold, E.M., Hamner, S.R., Ward, S.R., Lieber, R. L., and Delp, S.L.
  defaults:
    CoordinateActuator default: optimal_force=300
    Millard2012EquilibriumMuscle default: min_control=0.01 max_control=1 optimal_force=1 max_isometric_force=546
        optimal_fiber_length=0.0535 tendon_slack_length=0.078 pennation_angle_at_optimal=0 [radians]
        max_contraction_velocity=10
  BodySet:
    Body ground: mass=0 mass_center=(0 0 0) inertia_xx=0 inertia_yy=0 inertia_zz=0
    Body pelvis: mass=11.777 mass_center=(-0.0707 0 0) inertia_xx=0.1028 inertia_yy=0.0871 inertia_zz=0.0579
        meshes=(r_pelvis.vtp l_pelvis.vtp sacrum.vtp)
      CustomJoint ground_pelvis: parent_body=ground location_in_parent=(0 0 0) location=(0 0 0)
        Coordinate pelvis_tilt: motion_type=rotational default_value=0 range=(-1.570796 1.570796) clamped=true
        Coordinate pelvis_list: motion_type=rotational default_value=0 range=(-1.570796 1.570796) clamped=true
        Coordinate pelvis_rotation: motion_type=rotational default_value=0 range=(-1.570796 1.570796) clamped=true
        Coordinate pelvis_tx: motion_type=translational default_value=0 range=(-5 5) clamped=true
        Coordinate pelvis_ty: motion_type=translational default_value=0.93 range=(-1 2) clamped=true
        Coordinate pelvis_tz: motion_type=translational default_value=0 range=(-3 3) clamped=true
        SpatialTransform:
          TransformAxis rotation1: coordinates=pelvis_tilt axis=(0 0 1) LinearFunction(coefficients=1 0)
          TransformAxis rotation2: coordinates=pelvis_list axis=(1 0 0) LinearFunction(coefficients=1 0)
          TransformAxis rotation3: coordinates=pelvis_rotation axis=(0 1 0) LinearFunction(coefficients=1 0)
          TransformAxis translation1: coordinates=pelvis_tx axis=(1 0 0) LinearFunction(coefficients=1 0)
          TransformAxis translation2: coordinates=pelvis_ty axis=(0 1 0) LinearFunction(coefficients=1 0)
          TransformAxis translation3: coordinates=pelvis_tz axis=(0 0 1) LinearFunction(coefficients=1 0)
      WrapCylinder Gmax1_at_pelvis_r: xyz_body_rotation=(-0.6 0.45 0) translation=(-0.077 -0.099 0.061) quadrant=-x
          radius=0.04 length=0.15
      WrapCylinder Gmax2_at_pelvis_r: xyz_body_rotation=(-0.75 0.39 0) translation=(-0.08 -0.083 0.068) quadrant=all
          radius=0.04 length=0.1
      WrapCylinder Gmax3_at_pelvis_r: xyz_body_rotation=(-0.1 0 0) translation=(-0.083 -0.088 0.068) quadrant=all
          radius=0.04 length=0.1
      WrapCylinder Gmax1_at_pelvis_l: xyz_body_rotation=(0.6 -0.45 0) translation=(-0.077 -0.099 -0.061) quadrant=-x
          radius=0.04 length=0.15
      WrapCylinder Gmax2_at_pelvis_l: xyz_body_rotation=(0.75 -0.39 0) translation=(-0.08 -0.083 -0.068) quadrant=all
          radius=0.04 length=0.1
      WrapCylinder Gmax3_at_pelvis_l: xyz_body_rotation=(0.1 0 0) translation=(-0.083 -0.088 -0.068) quadrant=all
          radius=0.04 length=0.1
      WrapCylinder PS_at_brim_r: xyz_body_rotation=(-0.25 -0.27 0.1) translation=(-0.074 -0.06 0.0656) quadrant=-y
          radius=0.05 length=0.1
      WrapCylinder PS_at_brim_l: xyz_body_rotation=(0.25 0.27 0.1) translation=(-0.074 -0.06 -0.0656) quadrant=-y
          radius=0.05 length=0.1
      WrapCylinder IL_at_brim_r: xyz_body_rotation=(-0.32 -0.24 0.9) translation=(-0.071 -0.065 0.0756) quadrant=-y
          radius=0.0549 length=0.1
      WrapCylinder IL_at_brim_l: xyz_body_rotation=(0.32 0.24 0.9) translation=(-0.071 -0.065 -0.0756) quadrant=-y
          radius=0.0549 length=0.1
    Body femur_r: mass=9.3014 mass_center=(0 -0.17 0) inertia_xx=0.1339 inertia_yy=0.0351 inertia_zz=0.1412
        meshes=r_femur.vtp
      CustomJoint hip_r: parent_body=pelvis location_in_parent=(-0.056276 -0.07849 0.07726) location=(0 0 0)
        Coordinate hip_flexion_r: motion_type=rotational default_value=0 range=(-0.5235988 2.094395) clamped=true
        Coordinate hip_adduction_r: motion_type=rotational default_value=0 range=(-0.8726646 0.5235988) clamped=true
        Coordinate hip_rotation_r: motion_type=rotational default_value=0 range=(-0.6981317 0.6981317) clamped=true
        SpatialTransform: axes_held_at_zero=(translation1 translation2 translation3)
          TransformAxis rotation1: coordinates=hip_flexion_r axis=(0 0 1) LinearFunction(coefficients=1 0)
          TransformAxis rotation2: coordinates=hip_adduction_r axis=(1 0 0) LinearFunction(coefficients=1 0)
          TransformAxis rotation3: coordinates=hip_rotation_r axis=(0 1 0) LinearFunction(coefficients=1 0)
      WrapCylinder Gastroc_at_condyles_r: translation=(0.005 -0.41 0) quadrant=all radius=0.025 length=0.1
      WrapCylinder KnExt_at_fem_r: xyz_body_rotation=(-0.0623366 0.0507601 0)
          translation=(0.00358828 -0.402732 0.00209111) quadrant=all radius=0.025 length=0.1
      WrapCylinder AB_at_femshaft_r: xyz_body_rotation=(1.66157 0.186644 0) translation=(0.0146434 -0.112595 0.023365)
          quadrant=all radius=0.0165 length=0.07
      WrapCylinder AL_at_femshaft_r: xyz_body_rotation=(1.77711 0.136489 0) translation=(0.0307327 -0.231909 0.0151137)
          quadrant=all radius=0.0201 length=0.1
      WrapCylinder AMprox_at_femshaft_r: xyz_body_rotation=(1.61126 0.18656 0)
          translation=(0.00518299 -0.0728948 0.025403) quadrant=all radius=0.0211 length=0.07
      WrapCylinder AMmid_at_femshaft_r: xyz_body_rotation=(1.61139 0.13656 0)
          translation=(0.0230125 -0.160711 0.0205842) quadrant=all radius=0.0214 length=0.12
      WrapCylinder AMdist_at_femshaft_r: xyz_body_rotation=(1.71188 0.186636 0)
          translation=(0.0316065 -0.260736 0.0093646) quadrant=all radius=0.0218 length=0.2
      WrapCylinder AMisch_at_condyles_r: xyz_body_rotation=(1.71115 -0.463363 0)
          translation=(-0.0226511 -0.376831 -0.00315437) quadrant=all radius=0.04 length=0.24
      WrapCylinder PECT_at_femshaft_r: xyz_body_rotation=(1.81295 0.276344 0)
          translation=(0.00608573 -0.0845029 0.0304405) quadrant=all radius=0.015 length=0.05
    Body tibia_r: mass=3.7075 mass_center=(0 -0.1867 0) inertia_xx=0.0504 inertia_yy=0.0051 inertia_zz=0.0511
        meshes=(r_tibia.vtp r_fibula.vtp)
      CustomJoint walker_knee_r: parent_body=femur_r location_in_parent=(-0.00809 -0.40796 -0.00275)
          orientation_in_parent=(-1.641568 1.446181 1.570796) location=(-0.00808954 -0.0035348 -0.00148474)
          orientation=(-1.641568 1.446181 1.570796)
        Coordinate knee_angle_r: motion_type=rotational default_value=0 range=(0 2.0944) clamped=false
        SpatialTransform: axes_held_at_zero=translation3
          TransformAxis rotation1: coordinates=knee_angle_r axis=(1 0 0) LinearFunction(coefficients=1 0)
          TransformAxis rotation2: coordinates=knee_angle_r axis=(0 0 1)
            SimmSpline: x=(0 0.174533 0.349066 0.523599 0.698132 0.872665 1.0472 1.22173 1.39626 1.5708 1.74533 1.91986 2.0944)
                y=(0 0.0126809 0.0226969 0.0296054 0.0332049 0.0335354 0.0308779 0.0257548 0.0189295 0.011407 0.00443314 -0.00050475 -0.0016782)
          TransformAxis rotation3: coordinates=knee_angle_r axis=(0 1 0)
            SimmSpline: x=(0 0.174533 0.349066 0.523599 0.698132 0.872665 1.0472 1.22173 1.39626 1.5708 1.74533 1.91986 2.0944)
                y=(0 0.059461 0.109399 0.150618 0.18392 0.210107 0.229983 0.24435 0.254012 0.25977 0.262428 0.262788 0.261654)
          TransformAxis translation1: coordinates=knee_angle_r axis=(0 1 0)
            SimmSpline: x=(0 0.174533 0.349066 0.523599 0.698132 0.872665 1.0472 1.22173 1.39626 1.5708 1.74533 1.91986 2.0944)
                y=(0 0.000479 0.000835 0.001086 0.001251 0.001346 0.001391 0.001403 0.0014 0.0014 0.001421 0.001481 0.001599)
          TransformAxis translation2: coordinates=knee_angle_r axis=(0 0 1)
            SimmSpline: x=(0 0.174533 0.349066 0.523599 0.698132 0.872665 1.0472 1.22173 1.39626 1.5708 1.74533 1.91986 2.0944)
                y=(0 0.000988 0.001899 0.002734 0.003492 0.004173 0.004777 0.005305 0.005756 0.00613 0.006427 0.006648 0.006792)
      WrapCylinder GasLat_at_shank_r: xyz_body_rotation=(2.96723 -0.279725 -1.47812)
          translation=(-0.0074 -0.074 -0.0033) quadrant=-y radius=0.055 length=0.1
      WrapCylinder GasMed_at_shank_r: xyz_body_rotation=(2.96723 0.0279725 -1.47812)
          translation=(-0.0074 -0.074 -0.0033) quadrant=-y radius=0.055 length=0.1
      WrapCylinder GR_at_condyles_r: xyz_body_rotation=(0 -0.4 0) translation=(-0.003 -0.02 0) quadrant=all
          radius=0.036 length=0.1
      WrapCylinder SM_at_condyles_r: xyz_body_rotation=(0 -0.1 0) translation=(-0.001 -0.02 0) quadrant=all
          radius=0.0352 length=0.1
      WrapCylinder ST_at_condyles_r: xyz_body_rotation=(0 -0.2 0) translation=(-0.002 -0.0205 0) quadrant=all
          radius=0.0425 length=0.1
      WrapCylinder BF_at_gastroc_r: translation=(-0.058 -0.06 0) quadrant=y radius=0.03 length=0.15
    Body patella_r: mass=0.0862 mass_center=(0.0018 0.0264 0) inertia_xx=2.87e-6 inertia_yy=1.311e-5
        inertia_zz=1.311e-5 meshes=r_patella.vtp
      CustomJoint patellofemoral_r: parent_body=femur_r location_in_parent=(-0.00809 -0.40796 -0.00275)
          location=(0 0 0)
        Coordinate knee_angle_r_beta: motion_type=rotational default_value=0 range=(-99999.9 99999.9) clamped=false
        SpatialTransform: axes_held_at_zero=(rotation2 rotation3)
          TransformAxis rotation1: coordinates=knee_angle_r_beta axis=(0 0 1)
            SimmSpline f11: x=(0 0.174533 0.349066 0.523599 0.698132 0.872665 1.0472 1.22173 1.39626 1.5708 1.74533 1.91986 2.0944)
                y=(0.00113686 -0.00629212 -0.105582 -0.253683 -0.414245 -0.579047 -0.747244 -0.91799 -1.09044 -1.26379 -1.43763 -1.61186 -1.78634)
          TransformAxis translation1: coordinates=knee_angle_r_beta axis=(1 0 0)
            SimmSpline f9: x=(0 0.174533 0.349066 0.523599 0.698132 0.872665 1.0472 1.22173 1.39626 1.5708 1.74533 1.91986 2.0944)
                y=(0.0524 0.0488 0.0437 0.0371 0.0296 0.0216 0.0136 0.0057 -0.0019 -0.0088 -0.0148 -0.0196 -0.0227)
          TransformAxis translation2: coordinates=knee_angle_r_beta axis=(0 1 0)
            SimmSpline f10: x=(0 0.174533 0.349066 0.523599 0.698132 0.872665 1.0472 1.22173 1.39626 1.5708 1.74533 1.91986 2.0944)
                y=(-0.0108 -0.019 -0.0263 -0.0322 -0.0367 -0.0395 -0.0408 -0.0404 -0.0384 -0.0349 -0.0301 -0.0245 -0.0187)
          TransformAxis translation3: axis=(0 0 1) Constant(value=0.00275)
    Body talus_r: mass=0.1 mass_center=(0 0 0) inertia_xx=0.001 inertia_yy=0.001 inertia_zz=0.001 meshes=r_talus.vtp
      PinJoint ankle_r: parent_body=tibia_r location_in_parent=(-0.01 -0.4 0)
          orientation_in_parent=(0.1758952 -0.105208 0.01866219) location=(0 0 0)
          orientation=(0.1758952 -0.105208 0.01866219)
        Coordinate ankle_angle_r: motion_type=rotational default_value=0 range=(-0.6981317 0.5235988) clamped=true
    Body calcn_r: mass=1.25 mass_center=(0.1 0.03 0) inertia_xx=0.0014 inertia_yy=0.0039 inertia_zz=0.0041
        meshes=r_foot.vtp
      PinJoint subtalar_r: parent_body=talus_r location_in_parent=(-0.04877 -0.04195 0.00792)
          orientation_in_parent=(-1.768191 0.906223 1.819602) location=(0 0 0)
          orientation=(-1.768191 0.906223 1.819602)
        Coordinate subtalar_angle_r: motion_type=rotational default_value=0 range=(-0.3490659 0.3490659) clamped=true
            locked=true
    Body toes_r: mass=0.2166 mass_center=(0.0346 0.006 -0.0175) inertia_xx=0.0001 inertia_yy=0.0002 inertia_zz=0.001
        meshes=r_bofoot.vtp
      PinJoint mtp_r: parent_body=calcn_r location_in_parent=(0.1788 -0.002 0.00108)
          orientation_in_parent=(-3.141593 0.6199005 0) location=(0 0 0) orientation=(-3.141593 0.6199005 0)
        Coordinate mtp_angle_r: motion_type=rotational default_value=0 range=(-0.5235988 0.5235988) clamped=true
            locked=true
    Body torso: mass=26.8266 mass_center=(-0.03 0.32 0) inertia_xx=1.4745 inertia_yy=0.7555 inertia_zz=1.4314
        meshes=(hat_spine.vtp hat_jaw.vtp hat_skull.vtp hat_ribs_scap.vtp)
      CustomJoint back: parent_body=pelvis location_in_parent=(-0.1007 0.0815 0) location=(0 0 0)
        Coordinate lumbar_extension: motion_type=rotational default_value=0 range=(-1.570796 1.570796) clamped=true
        Coordinate lumbar_bending: motion_type=rotational default_value=0 range=(-1.570796 1.570796) clamped=true
        Coordinate lumbar_rotation: motion_type=rotational default_value=0 range=(-1.570796 1.570796) clamped=true
        SpatialTransform: axes_held_at_zero=(translation1 translation2 translation3)
          TransformAxis rotation1: coordinates=lumbar_extension axis=(0 0 1) LinearFunction(coefficients=1 0)
          TransformAxis rotation2: coordinates=lumbar_bending axis=(1 0 0) LinearFunction(coefficients=1 0)
          TransformAxis rotation3: coordinates=lumbar_rotation axis=(0 1 0) LinearFunction(coefficients=1 0)
  ConstraintSet:
    CoordinateCouplerConstraint patellofemoral_knee_angle_r_con: independent_coordinate_names=knee_angle_r
        dependent_coordinate_name=knee_angle_r_beta scale_factor=1
        coupled_coordinates_function=LinearFunction(coefficients=1 0)
  ForceSet:
    Millard2012EquilibriumMuscle [values shared by the 40 below unless stated]: fiber_damping=0.01
        default_activation=0.01 minimum_activation=0.01
      ActiveForceLengthCurve: min_norm_active_fiber_length=0.25 transition_norm_fiber_length=0.77
          max_norm_active_fiber_length=1.9 shallow_ascending_slope=0.75 minimum_value=0
      ForceVelocityCurve: concentric_slope_at_vmax=0 concentric_slope_near_vmax=0.25 isometric_slope=5
          eccentric_slope_at_vmax=0 eccentric_slope_near_vmax=0.15 max_eccentric_velocity_force_multiplier=1.4
      FiberForceLengthCurve: strain_at_zero_force=0 strain_at_one_norm_force=0.7
      TendonForceLengthCurve
    Millard2012EquilibriumMuscle add_brev_r: max_isometric_force=625.8197 optimal_fiber_length=0.1031
        tendon_slack_length=0.03545029 pennation_angle_at_optimal=0.1147809 ignore_tendon_compliance=true
      PathPoint addbrev_r-P1: pelvis (-0.0191 -0.094 0.0154)
      PathPoint addbrev_r-P2: femur_r (-0.002 -0.118 0.0249)
      PathWrap: wrap_object=AB_at_femshaft_r method=hybrid
    Millard2012EquilibriumMuscle add_long_r: max_isometric_force=916.8 optimal_fiber_length=0.1082
        tendon_slack_length=0.1317994 pennation_angle_at_optimal=0.1377704
      PathPoint addlong_r-P1: pelvis (-0.00758 -0.0889 0.01888)
      PathPoint addlong_r-P2: femur_r (0.01126 -0.23937 0.01583)
      PathWrap: wrap_object=AL_at_femshaft_r method=hybrid
    Millard2012EquilibriumMuscle add_mag3_r: max_isometric_force=597.2951 optimal_fiber_length=0.1772
        tendon_slack_length=0.0873807 pennation_angle_at_optimal=0.194705 ignore_tendon_compliance=true
      PathPoint addmagDist_r-P1: pelvis (-0.07404 -0.12767 0.03982)
      PathPoint addmagDist_r-P2: femur_r (0.01125 -0.2625 0.0193)
      PathWrap: wrap_object=AMdist_at_femshaft_r method=hybrid
    Millard2012EquilibriumMuscle add_mag4_r: max_isometric_force=597.2951 optimal_fiber_length=0.1562
        tendon_slack_length=0.216343 pennation_angle_at_optimal=0.1680443
      PathPoint addmagIsch_r-P1: pelvis (-0.08962 -0.12976 0.04171)
      PathPoint addmagIsch_r-P2: femur_r (0.00481 -0.38797 -0.03273)
      PathWrap: wrap_object=AMisch_at_condyles_r method=hybrid
    Millard2012EquilibriumMuscle add_mag2_r: max_isometric_force=597.2951 optimal_fiber_length=0.1377
        tendon_slack_length=0.0466277 pennation_angle_at_optimal=0.2073076 ignore_tendon_compliance=true
      PathPoint addmagMid_r-P1: pelvis (-0.05266 -0.12075 0.02854)
      PathPoint addmagMid_r-P2: femur_r (0.00242 -0.1624 0.02922)
      PathWrap: wrap_object=AMmid_at_femshaft_r method=hybrid
    Millard2012EquilibriumMuscle add_mag1_r: max_isometric_force=597.2951 optimal_fiber_length=0.1056
        tendon_slack_length=0.0403241 pennation_angle_at_optimal=0.3114833 ignore_tendon_compliance=true
      PathPoint addmagProx_r-P1: pelvis (-0.03098 -0.10755 0.01365)
      PathPoint addmagProx_r-P2: femur_r (-0.01527 -0.07886 0.03202)
      PathWrap: wrap_object=AMprox_at_femshaft_r method=hybrid
    Millard2012EquilibriumMuscle bifemlh_r: max_isometric_force=1313.184 optimal_fiber_length=0.0976
        tendon_slack_length=0.3252266 pennation_angle_at_optimal=0.1759182
      PathPoint bflh_r-P1: pelvis (-0.104 -0.1191 0.0586)
      PathPoint bflh_r-P2: tibia_r (-0.0337 -0.035 0.0253)
      PathPoint bflh_r-P3: tibia_r (-0.0287 -0.0455 0.0303)
    Millard2012EquilibriumMuscle bifemsh_r: max_isometric_force=557.1148 optimal_fiber_length=0.1103
        tendon_slack_length=0.1058172 pennation_angle_at_optimal=0.2642232 ignore_tendon_compliance=true
      PathPoint bfsh_r-P1: femur_r (0.005 -0.2111 0.0234)
      PathPoint bfsh_r-P2: tibia_r (-0.0301 -0.0419 0.0318)
      PathWrap: wrap_object=BF_at_gastroc_r method=hybrid
    Millard2012EquilibriumMuscle ext_dig_r: max_isometric_force=603.4982 optimal_fiber_length=0.0693
        tendon_slack_length=0.3688752 pennation_angle_at_optimal=0.2182582
      PathPoint edl_r-P1: tibia_r (-0.016 -0.1157 0.0205)
      PathPoint edl_r-P2: tibia_r (0.0164 -0.376 0.0112)
      PathPoint edl_r-P3: calcn_r (0.0919 0.036 0.0008)
      PathPoint edl_r-P4: calcn_r (0.1616 0.0055 0.013)
      PathPoint edl_r-P5: toes_r (0.0003 0.0047 0.0153)
      PathPoint edl_r-P6: toes_r (0.0443 -0.0004 0.025)
    Millard2012EquilibriumMuscle ext_hal_r: max_isometric_force=285.8675 optimal_fiber_length=0.0748
        tendon_slack_length=0.3267953 pennation_angle_at_optimal=0.1972681
      PathPoint ehl_r-P1: tibia_r (-0.014 -0.155 0.0189)
      PathPoint ehl_r-P2: tibia_r (0.0071 -0.2909 0.0164)
      PathPoint ehl_r-P3: tibia_r (0.02 -0.3693 -0.0028)
      PathPoint ehl_r-P4: calcn_r (0.097 0.0389 -0.0211)
      PathPoint ehl_r-P5: calcn_r (0.1293 0.0309 -0.0257)
      PathPoint ehl_r-P6: calcn_r (0.1734 0.0139 -0.028)
      PathPoint ehl_r-P7: toes_r (0.0298 0.0041 -0.0245)
      PathPoint ehl_r-P8: toes_r (0.0563 0.0034 -0.0186)
    Millard2012EquilibriumMuscle flex_dig_r: max_isometric_force=423.177 optimal_fiber_length=0.0446
        tendon_slack_length=0.3787729 pennation_angle_at_optimal=0.2248391
      PathPoint fdl_r-P1: tibia_r (-0.0023 -0.1832 -0.0018)
      PathPoint fdl_r-P2: tibia_r (-0.0176 -0.3645 -0.0124)
      PathPoint fdl_r-P3: calcn_r (0.0436 0.0315 -0.028)
      PathPoint fdl_r-P4: calcn_r (0.0708 0.0176 -0.0263)
      PathPoint fdl_r-P5: calcn_r (0.1658 -0.0081 0.0116)
      PathPoint fdl_r-P6: toes_r (-0.0019 -0.0078 0.0147)
      PathPoint fdl_r-P7: toes_r (0.0285 -0.0071 0.0215)
      PathPoint fdl_r-P8: toes_r (0.0441 -0.006 0.0242)
    Millard2012EquilibriumMuscle flex_hal_r: max_isometric_force=907.8393 optimal_fiber_length=0.0527
        tendon_slack_length=0.3543397 pennation_angle_at_optimal=0.2580255
      PathPoint fhl_r-P1: tibia_r (-0.031 -0.2163 0.02)
      PathPoint fhl_r-P2: tibia_r (-0.0242 -0.3671 -0.0076)
      PathPoint fhl_r-P3: calcn_r (0.0374 0.0276 -0.0241)
      PathPoint fhl_r-P4: calcn_r (0.1038 0.0068 -0.0256)
      PathPoint fhl_r-P5: calcn_r (0.1726 -0.0053 -0.0269)
      PathPoint fhl_r-P6: toes_r (0.0155 -0.0064 -0.0265)
      PathPoint fhl_r-P7: toes_r (0.0562 -0.0102 -0.0181)
    Millard2012EquilibriumMuscle lat_gas_r: max_isometric_force=1575.059 optimal_fiber_length=0.0588
        tendon_slack_length=0.3760702 pennation_angle_at_optimal=0.2102268
      PathPoint gaslat_r-P1: femur_r (-0.003 -0.3814 0.0277)
      PathPoint gaslat_r-P2: calcn_r (0.0044 0.031 -0.0053)
      PathWrap: wrap_object=GasLat_at_shank_r method=hybrid
      PathWrap: wrap_object=Gastroc_at_condyles_r method=hybrid
    Millard2012EquilibriumMuscle med_gas_r: max_isometric_force=3115.515 optimal_fiber_length=0.051
        tendon_slack_length=0.3987163 pennation_angle_at_optimal=0.1656816
      PathPoint gasmed_r-P1: femur_r (0.008 -0.3788 -0.0208)
      PathPoint gasmed_r-P2: calcn_r (0.0044 0.031 -0.0053)
      PathWrap: wrap_object=GasMed_at_shank_r method=hybrid
      PathWrap: wrap_object=Gastroc_at_condyles_r method=hybrid
    Millard2012EquilibriumMuscle glut_max1_r: max_isometric_force=983.7836 optimal_fiber_length=0.147
        tendon_slack_length=0.04884089 pennation_angle_at_optimal=0.3540118 ignore_tendon_compliance=true
      PathPoint glmax1_r-P1: pelvis (-0.1231 0.0345 0.0563)
      PathPoint glmax1_r-P2: pelvis (-0.1257 -0.0242 0.0779)
      PathPoint glmax1_r-P3: femur_r (-0.0444 -0.0326 0.0302)
      PathPoint glmax1_r-P4: femur_r (-0.0277 -0.0566 0.047)
      PathWrap: wrap_object=Gmax1_at_pelvis_r method=hybrid
    Millard2012EquilibriumMuscle glut_max2_r: max_isometric_force=1406.046 optimal_fiber_length=0.157
        tendon_slack_length=0.06788715 pennation_angle_at_optimal=0.3673821 ignore_tendon_compliance=true
      PathPoint glmax2_r-P1: pelvis (-0.1317 0.0087 0.0462)
      PathPoint glmax2_r-P2: pelvis (-0.1344 -0.0609 0.0813)
      PathPoint glmax2_r-P3: femur_r (-0.045 -0.0584 0.0252)
      PathPoint glmax2_r-P4: femur_r (-0.0156 -0.1016 0.0419)
      PathWrap: wrap_object=Gmax2_at_pelvis_r method=hybrid
    Millard2012EquilibriumMuscle glut_max3_r: max_isometric_force=947.7541 optimal_fiber_length=0.167
        tendon_slack_length=0.06971661 pennation_angle_at_optimal=0.3824161 ignore_tendon_compliance=true
      PathPoint glmax3_r-P1: pelvis (-0.13 -0.0525 0.009)
      PathPoint glmax3_r-P2: pelvis (-0.1273 -0.1263 0.0435)
      PathPoint glmax3_r-P3: femur_r (-0.0281 -0.1125 0.0094)
      PathPoint glmax3_r-P4: femur_r (-0.006 -0.1419 0.0411)
      PathWrap: wrap_object=Gmax3_at_pelvis_r method=hybrid
    Millard2012EquilibriumMuscle glut_med1_r: max_isometric_force=1093.467 optimal_fiber_length=0.073
        tendon_slack_length=0.05581683 pennation_angle_at_optimal=0.3165559 ignore_tendon_compliance=true
      PathPoint glmed1_r-P1: pelvis (-0.0445 0.0245 0.1172)
      PathPoint glmed1_r-P2: femur_r (-0.0218 -0.0117 0.0555)
    Millard2012EquilibriumMuscle glut_med2_r: max_isometric_force=765.0917 optimal_fiber_length=0.073
        tendon_slack_length=0.06524881 pennation_angle_at_optimal=0.3165559 ignore_tendon_compliance=true
      PathPoint glmed2_r-P1: pelvis (-0.085 0.0316 0.0675)
      PathPoint glmed2_r-P2: femur_r (-0.0258 -0.0058 0.0527)
    Millard2012EquilibriumMuscle glut_med3_r: max_isometric_force=871.1993 optimal_fiber_length=0.073
        tendon_slack_length=0.04523284 pennation_angle_at_optimal=0.3165559 ignore_tendon_compliance=true
      PathPoint glmed3_r-P1: pelvis (-0.1152 -0.0073 0.0526)
      PathPoint glmed3_r-P2: femur_r (-0.0309 -0.0047 0.0518)
    Millard2012EquilibriumMuscle glut_min1_r: max_isometric_force=374.0459 optimal_fiber_length=0.068
        tendon_slack_length=0.01613778 pennation_angle_at_optimal=0.1745329 ignore_tendon_compliance=true
      PathPoint glmin1_r-P1: pelvis (-0.0464 -0.0149 0.1042)
      PathPoint glmin1_r-P2: femur_r (-0.0072 -0.0104 0.056)
    Millard2012EquilibriumMuscle glut_min2_r: max_isometric_force=394.8197 optimal_fiber_length=0.056
        tendon_slack_length=0.02609905 pennation_angle_at_optimal=0 ignore_tendon_compliance=true
      PathPoint glmin2_r-P1: pelvis (-0.0616 -0.0142 0.0971)
      PathPoint glmin2_r-P2: femur_r (-0.0096 -0.0104 0.056)
    Millard2012EquilibriumMuscle glut_min3_r: max_isometric_force=446.7738 optimal_fiber_length=0.038
        tendon_slack_length=0.0508725 pennation_angle_at_optimal=0.01745329
      PathPoint glmin3_r-P1: pelvis (-0.0789 -0.0155 0.0798)
      PathPoint glmin3_r-P2: femur_r (-0.0135 -0.0083 0.055)
    Millard2012EquilibriumMuscle grac_r: max_isometric_force=281.3115 optimal_fiber_length=0.2278
        tendon_slack_length=0.1720138 pennation_angle_at_optimal=0.1720016 ignore_tendon_compliance=true
      PathPoint P1: pelvis (-0.04736 -0.12932 0.02456)
      PathPoint P2: tibia_r (-0.01842 -0.04755 -0.02961)
      PathPoint P3: tibia_r (0.00178 -0.06962 -0.01573)
      PathWrap: wrap_object=GR_at_condyles_r method=hybrid
    Millard2012EquilibriumMuscle iliacus_r: max_isometric_force=1021.141 optimal_fiber_length=0.1066
        tendon_slack_length=0.09612071 pennation_angle_at_optimal=0.279914 ignore_tendon_compliance=true
      PathPoint P1: pelvis (-0.0605 0.0309 0.0843)
      PathPoint P2: pelvis (-0.0135 -0.0557 0.0756)
      PathPoint P3: femur_r (-0.0023 -0.0565 0.0139)
      PathPoint P4: femur_r (-0.0122 -0.0637 0.0196)
      PathWrap: wrap_object=IL_at_brim_r method=hybrid range=(2 3)
    Millard2012EquilibriumMuscle per_brev_r: max_isometric_force=521.2016 optimal_fiber_length=0.0454
        tendon_slack_length=0.1475275 pennation_angle_at_optimal=0.2052361
      PathPoint perbrev_r-P1: tibia_r (-0.0243 -0.2532 0.0251)
      PathPoint perbrev_r-P2: tibia_r (-0.0339 -0.3893 0.0249)
      PathPoint perbrev_r-P3: tibia_r (-0.0285 -0.4004 0.0255)
      PathPoint perbrev_r-P4: calcn_r (0.0471 0.027 0.0233)
      PathPoint perbrev_r-P5: calcn_r (0.0677 0.0219 0.0343)
    Millard2012EquilibriumMuscle per_long_r: max_isometric_force=1115.371 optimal_fiber_length=0.0508
        tendon_slack_length=0.3322208 pennation_angle_at_optimal=0.2479525
      PathPoint perlong_r-P1: tibia_r (-0.02 -0.1373 0.0282)
      PathPoint perlong_r-P2: tibia_r (-0.0317 -0.39 0.0237)
      PathPoint perlong_r-P3: tibia_r (-0.0272 -0.4014 0.024)
      PathPoint perlong_r-P4: calcn_r (0.0438 0.023 0.0221)
      PathPoint perlong_r-P5: calcn_r (0.0681 0.0106 0.0284)
      PathPoint perlong_r-P6: calcn_r (0.0852 0.0069 0.0118)
      PathPoint perlong_r-P7: calcn_r (0.1203 0.0085 -0.0184)
    Millard2012EquilibriumMuscle peri_r: max_isometric_force=1029.787 optimal_fiber_length=0.026
        tendon_slack_length=0.1149062 pennation_angle_at_optimal=0.1745329
      PathPoint piri_r-P1: pelvis (-0.10181 -0.00653 0.01351)
      PathPoint piri_r-P2: pelvis (-0.10202 -0.03066 0.06092)
      PathPoint piri_r-P3: femur_r (-0.0148 -0.0036 0.0437)
    Millard2012EquilibriumMuscle psoas_r: max_isometric_force=1426.79 optimal_fiber_length=0.1169
        tendon_slack_length=0.09954317 pennation_angle_at_optimal=0.2155251 ignore_tendon_compliance=true
      PathPoint P1: pelvis (-0.0606 0.062 0.039)
      PathPoint P2: pelvis (-0.0205 -0.0654 0.0656)
      PathPoint P3: femur_r (-0.0132 -0.0467 0.0046)
      PathPoint P4: femur_r (-0.0235 -0.0524 0.0088)
      PathWrap: wrap_object=PS_at_brim_r method=hybrid range=(2 3)
    Millard2012EquilibriumMuscle rect_fem_r: max_isometric_force=2191.741 optimal_fiber_length=0.0759
        tendon_slack_length=0.4484935 pennation_angle_at_optimal=0.2170149
      PathPoint recfem_r-P1: pelvis (-0.024 -0.0388 0.0933)
      PathPoint recfem_r-P2: patella_r (0.01 0.049 0.0007)
      PathPoint recfem_r-P3: patella_r (0.0121 0.0437 -0.001)
      PathPoint recfem_r-P4: patella_r (0.005 0.00247 3e-5)
      PathPoint recfem_r-P5: tibia_r (0.0326 -0.06312 -0.00047)
      PathWrap: wrap_object=KnExt_at_fem_r method=hybrid
    Millard2012EquilibriumMuscle sar_r: max_isometric_force=249.4131 optimal_fiber_length=0.403
        tendon_slack_length=0.1239998 pennation_angle_at_optimal=0.02613542 ignore_tendon_compliance=true
      PathPoint sart_r-P1: pelvis (-0.0195 -0.0156 0.1056)
      PathPoint sart_r-P2: femur_r (-0.003 -0.3568 -0.0421)
      PathPoint sart_r-P3: tibia_r (-0.0251 -0.0401 -0.0365)
      PathPoint sart_r-P4: tibia_r (-0.0159 -0.0599 -0.0264)
      PathPoint sart_r-P5: tibia_r (0.0136 -0.081 -0.0026)
    Millard2012EquilibriumMuscle semimem_r: max_isometric_force=2200.987 optimal_fiber_length=0.069
        tendon_slack_length=0.347586 pennation_angle_at_optimal=0.2545615
      PathPoint P1: pelvis (-0.0987 -0.114 0.0614)
      PathPoint P2: tibia_r (-0.029 -0.0417 -0.0196)
      PathWrap: wrap_object=SM_at_condyles_r method=hybrid
    Millard2012EquilibriumMuscle semiten_r: max_isometric_force=591.2951 optimal_fiber_length=0.193
        tendon_slack_length=0.2471989 pennation_angle_at_optimal=0.241295
      PathPoint P1: pelvis (-0.1038 -0.1253 0.0515)
      PathPoint P2: tibia_r (-0.0312 -0.0508 -0.0229)
      PathPoint P3: tibia_r (0.0019 -0.0773 -0.0117)
      PathWrap: wrap_object=ST_at_condyles_r method=hybrid
    Millard2012EquilibriumMuscle soleus_r: max_isometric_force=6194.843 optimal_fiber_length=0.044
        tendon_slack_length=0.2767559 pennation_angle_at_optimal=0.3814289
      PathPoint P1: tibia_r (-0.0076 -0.0916 0.0098)
      PathPoint P2: calcn_r (0.0044 0.031 -0.0053)
    Millard2012EquilibriumMuscle tfl_r: max_isometric_force=411.2066 optimal_fiber_length=0.095
        tendon_slack_length=0.4494971 pennation_angle_at_optimal=0.05235988
      PathPoint P1: pelvis (-0.0311 0.0214 0.1241)
      PathPoint P2: femur_r (0.0294 -0.0995 0.0597)
      PathPoint P3: femur_r (0.0107 -0.405 0.0324)
      PathPoint P4: tibia_r (0.0108 -0.041 0.0346)
    Millard2012EquilibriumMuscle tib_ant_r: max_isometric_force=1227.452 optimal_fiber_length=0.0683
        tendon_slack_length=0.240461 pennation_angle_at_optimal=0.1951828
      PathPoint tibant_r-P1: tibia_r (0.0154 -0.1312 0.0162)
      PathPoint tibant_r-P2: tibia_r (0.0251 -0.1906 0.0128)
      PathPoint tibant_r-P3: tibia_r (0.0233 -0.3659 -0.0132)
      PathPoint tibant_r-P4: calcn_r (0.1166 0.0178 -0.0305)
    Millard2012EquilibriumMuscle tib_post_r: max_isometric_force=1730.154 optimal_fiber_length=0.0378
        tendon_slack_length=0.2807796 pennation_angle_at_optimal=0.2264891
      PathPoint tibpost_r-P1: tibia_r (-0.0041 -0.1304 0.0103)
      PathPoint tibpost_r-P2: tibia_r (-0.0164 -0.3655 -0.0175)
      PathPoint tibpost_r-P3: calcn_r (0.0417 0.0334 -0.0286)
      PathPoint tibpost_r-P4: calcn_r (0.0772 0.0159 -0.0281)
    Millard2012EquilibriumMuscle vas_int_r: max_isometric_force=1697.361 optimal_fiber_length=0.0993
        tendon_slack_length=0.2022107 pennation_angle_at_optimal=0.06309973
      PathPoint vasint_r-P1: femur_r (0.029 -0.1924 0.031)
      PathPoint vasint_r-P2: femur_r (0.0335 -0.2084 0.0285)
      PathPoint vasint_r-P3: patella_r (0.0058 0.048 -0.0006)
      PathPoint vasint_r-P4: patella_r (0.005 0.00247 -0.00039)
      PathPoint vasint_r-P5: tibia_r (0.03257 -0.0632 0.00043)
      PathWrap: wrap_object=KnExt_at_fem_r method=hybrid
    Millard2012EquilibriumMuscle vas_lat_r: max_isometric_force=5148.767 optimal_fiber_length=0.0994
        tendon_slack_length=0.2206013 pennation_angle_at_optimal=0.2528673
      PathPoint vaslat_r-P1: femur_r (0.0048 -0.1854 0.0349)
      PathPoint vaslat_r-P2: femur_r (0.0269 -0.2591 0.0409)
      PathPoint vaslat_r-P3: patella_r (0.0103 0.0423 0.0141)
      PathPoint vaslat_r-P4: patella_r (0.005 0.00247 0.00733)
      PathPoint vaslat_r-P5: tibia_r (0.03254 -0.06338 0.00511)
      PathWrap: wrap_object=KnExt_at_fem_r method=hybrid
    Millard2012EquilibriumMuscle vas_med_r: max_isometric_force=2747.823 optimal_fiber_length=0.0968
        tendon_slack_length=0.1999043 pennation_angle_at_optimal=0.4222225
      PathPoint vasmed_r-P1: femur_r (0.014 -0.2099 0.0188)
      PathPoint vasmed_r-P2: femur_r (0.0356 -0.2769 0.0009)
      PathPoint vasmed_r-P3: patella_r (0.0063 0.0445 -0.017)
      PathPoint vasmed_r-P4: patella_r (0.005 0.00247 -0.0085)
      PathPoint vasmed_r-P5: tibia_r (0.0319 -0.06357 -0.00678)
      PathWrap: wrap_object=KnExt_at_fem_r method=hybrid
    CoordinateActuator lumbar_ext: coordinate=lumbar_extension optimal_force=10
    CoordinateActuator lumbar_bend: coordinate=lumbar_bending optimal_force=10
    CoordinateActuator lumbar_rot: coordinate=lumbar_rotation optimal_force=10
    ObjectGroup right_leg: members=(addbrev_r addlong_r addmagDist_r addmagIsch_r addmagMid_r addmagProx_r bflh_r bfsh_r edl_r ehl_r fdl_r fhl_r gaslat_r gasmed_r glmax1_r glmax2_r glmax3_r glmed1_r glmed2_r glmed3_r glmin1_r glmin2_r glmin3_r grac_r iliacus_r perbrev_r perlong_r piri_r psoas_r recfem_r sart_r semimem_r semiten_r soleus_r tfl_r tibant_r tibpost_r vasint_r vaslat_r vasmed_r)
    ObjectGroup hip_add_r: members=(addbrev_r addlong_r addmagDist_r addmagIsch_r addmagMid_r addmagProx_r bflh_r grac_r semimem_r semiten_r)
    ObjectGroup hip_abd_r: members=(glmax1_r glmed1_r glmed2_r glmed3_r glmin1_r glmin2_r glmin3_r piri_r sart_r tfl_r)
    ObjectGroup hip_flex_r: members=(addbrev_r addlong_r glmin1_r grac_r iliacus_r psoas_r recfem_r sart_r tfl_r)
    ObjectGroup hip_ext_r: members=(addlong_r addmagDist_r addmagIsch_r addmagMid_r addmagProx_r bflh_r glmax1_r glmax2_r glmax3_r glmed1_r glmed2_r glmed3_r glmin3_r semimem_r semiten_r)
    ObjectGroup hip_inrot_r: members=(glmed1_r glmed2_r glmed3_r glmin1_r iliacus_r psoas_r tfl_r)
    ObjectGroup hip_exrot_r: members=(glmin3_r piri_r)
    ObjectGroup knee_flex_r: members=(bflh_r bfsh_r gaslat_r gasmed_r grac_r sart_r semimem_r semiten_r)
    ObjectGroup knee_ext_r: members=(recfem_r vasint_r vaslat_r vasmed_r)
    ObjectGroup ankle_df_r: members=(edl_r ehl_r tibant_r)
    ObjectGroup ankle_pf_r: members=(fdl_r fhl_r gaslat_r gasmed_r perbrev_r perlong_r soleus_r tibpost_r)
    ObjectGroup everter_r: members=(edl_r perbrev_r perlong_r)
    ObjectGroup inverter_r: members=(ehl_r fdl_r fhl_r tibant_r tibpost_r)
  MarkerSet:
    Marker RAC: torso (0.02 0.41 0.14) fixed=true
    Marker LAC: torso (0.02 0.41 -0.14) fixed=true
    Marker C7: torso (-0.055 0.465 0.0017) fixed=true
    Marker RASIS: pelvis (0.005 0.018 0.135) fixed=true
    Marker LASIS: pelvis (0.005 0.018 -0.135) fixed=true
    Marker RPSIS: pelvis (-0.155 0.035 0.035) fixed=true
    Marker LPSIS: pelvis (-0.155 0.035 -0.035) fixed=true
    Marker RHJC: pelvis (-0.0563 -0.0785 0.07726) fixed=true
    Marker RSLT: femur_r (0.07 -0.15 0.04)
    Marker RSMT: femur_r (0.07 -0.15 -0.01)
    Marker RIMT: femur_r (0.07 -0.2 -0.01)
    Marker RLK: femur_r (0 -0.404 0.05) fixed=true
    Marker RMK: femur_r (0 -0.404 -0.05) fixed=true
    Marker RKJC: tibia_r (0.001731 -0.002389 -0.008452) fixed=true
    Marker RSPS: tibia_r (-0.025 -0.195 0.05)
    Marker RSAS: tibia_r (0.025 -0.195 0.05)
    Marker RIAS: tibia_r (0.025 -0.245 0.05)
    Marker RLA: tibia_r (-0.005 -0.3888 0.053) fixed=true
    Marker RMA: tibia_r (0.006 -0.3888 -0.038) fixed=true
    Marker RAJC: talus_r (0 0 0) fixed=true
    Marker RMT: calcn_r (0.19 0.01 -0.05) fixed=true
    Marker RLT: calcn_r (0.16 0.02 0.05) fixed=true
    Marker MidAC: torso (0.02 0.41 0) fixed=true
    Marker RIC: pelvis (-0.069 0.09 0.135) fixed=true
    Marker LIC: pelvis (-0.069 0.09 -0.135) fixed=true
    Marker MidIC: pelvis (-0.069 0.09 0) fixed=true
    Marker RWST: pelvis (-0.029 0.066 0.14) fixed=true
    Marker LWST: pelvis (-0.029 0.066 -0.14) fixed=true
    Marker MidASIS: pelvis (0.005 0.018 0) fixed=true
    Marker MidPSIS: pelvis (-0.155 0.035 0) fixed=true
    Marker MidPELV: pelvis (-0.075 0.0265 0) fixed=true
    Marker RHJC_P: pelvis (-0.0563 0.09 0.07726) fixed=true
    Marker RTC: femur_r (-0.01 -0.015 0.085) fixed=true
    Marker LTC: pelvis (-0.066276 -0.09349 -0.16226) fixed=true
    Marker MidTC: pelvis (-0.066276 -0.09349 0) fixed=true
    Marker RILT: femur_r (0.07 -0.2 0.04)
    Marker RIPS: tibia_r (-0.025 -0.245 0.05)
    Marker RLH: calcn_r (0.03 0.02 0.05) fixed=true
    Marker RAJC_P: calcn_r (0.04877 -0.0051348 -0.00792004) fixed=true
    Marker RDTip: toes_r (0 0.022 -0.018) fixed=true
    Marker RLT_P: toes_r (-0.0188 -0.0031348 0.04892) fixed=true
    Marker RMT_P: toes_r (0.0112 -0.0031348 -0.05108) fixed=true
    Marker RMidT_P: toes_r (-0.0038 -0.0031348 -0.00108) fixed=true
    Marker RDAC: calcn_r (-0.025 0.05 -0.005)
    Marker RPAC: tibia_r (-0.08377 -0.26695 0.00292)
  ProbeSet:
    Umberger2010MuscleMetabolicsProbe metabolic_power: probe_operation=value activation_maintenance_rate_on=true
        shortening_rate_on=true basal_rate_on=false mechanical_work_rate_on=true report_total_metabolics_only=false
      Umberger2010MuscleMetabolicsProbe_MetabolicMuscleParameterSet:
        Umberger2010MuscleMetabolicsProbe_MetabolicMuscleParameter add_brev_r: ratio_slow_twitch_fibers=0.5
            use_provided_muscle_mass=false
        Umberger2010MuscleMetabolicsProbe_MetabolicMuscleParameter add_long_r: ratio_slow_twitch_fibers=0.5
            use_provided_muscle_mass=false
        Umberger2010MuscleMetabolicsProbe_MetabolicMuscleParameter add_mag3_r: ratio_slow_twitch_fibers=0.552
            use_provided_muscle_mass=false
        Umberger2010MuscleMetabolicsProbe_MetabolicMuscleParameter add_mag4_r: ratio_slow_twitch_fibers=0.552
            use_provided_muscle_mass=false
        Umberger2010MuscleMetabolicsProbe_MetabolicMuscleParameter add_mag2_r: ratio_slow_twitch_fibers=0.552
            use_provided_muscle_mass=false
        Umberger2010MuscleMetabolicsProbe_MetabolicMuscleParameter add_mag1_r: ratio_slow_twitch_fibers=0.552
            use_provided_muscle_mass=false
        Umberger2010MuscleMetabolicsProbe_MetabolicMuscleParameter bifemlh_r: ratio_slow_twitch_fibers=0.5425
            use_provided_muscle_mass=false
        Umberger2010MuscleMetabolicsProbe_MetabolicMuscleParameter bifemsh_r: ratio_slow_twitch_fibers=0.529
            use_provided_muscle_mass=false
        Umberger2010MuscleMetabolicsProbe_MetabolicMuscleParameter ext_dig_r: ratio_slow_twitch_fibers=0.75
            use_provided_muscle_mass=false
        Umberger2010MuscleMetabolicsProbe_MetabolicMuscleParameter ext_hal_r: ratio_slow_twitch_fibers=0.75
            use_provided_muscle_mass=false
        Umberger2010MuscleMetabolicsProbe_MetabolicMuscleParameter flex_dig_r: ratio_slow_twitch_fibers=0.6
            use_provided_muscle_mass=false
        Umberger2010MuscleMetabolicsProbe_MetabolicMuscleParameter flex_hal_r: ratio_slow_twitch_fibers=0.6
            use_provided_muscle_mass=false
        Umberger2010MuscleMetabolicsProbe_MetabolicMuscleParameter lat_gas_r: ratio_slow_twitch_fibers=0.507
            use_provided_muscle_mass=false
        Umberger2010MuscleMetabolicsProbe_MetabolicMuscleParameter med_gas_r: ratio_slow_twitch_fibers=0.566
            use_provided_muscle_mass=false
        Umberger2010MuscleMetabolicsProbe_MetabolicMuscleParameter glut_max1_r: ratio_slow_twitch_fibers=0.55
            use_provided_muscle_mass=false
        Umberger2010MuscleMetabolicsProbe_MetabolicMuscleParameter glut_max2_r: ratio_slow_twitch_fibers=0.55
            use_provided_muscle_mass=false
        Umberger2010MuscleMetabolicsProbe_MetabolicMuscleParameter glut_max3_r: ratio_slow_twitch_fibers=0.55
            use_provided_muscle_mass=false
        Umberger2010MuscleMetabolicsProbe_MetabolicMuscleParameter glut_med1_r: ratio_slow_twitch_fibers=0.55
            use_provided_muscle_mass=false
        Umberger2010MuscleMetabolicsProbe_MetabolicMuscleParameter glut_med2_r: ratio_slow_twitch_fibers=0.55
            use_provided_muscle_mass=false
        Umberger2010MuscleMetabolicsProbe_MetabolicMuscleParameter glut_med3_r: ratio_slow_twitch_fibers=0.55
            use_provided_muscle_mass=false
        Umberger2010MuscleMetabolicsProbe_MetabolicMuscleParameter glut_min1_r: ratio_slow_twitch_fibers=0.55
            use_provided_muscle_mass=false
        Umberger2010MuscleMetabolicsProbe_MetabolicMuscleParameter glut_min2_r: ratio_slow_twitch_fibers=0.55
            use_provided_muscle_mass=false
        Umberger2010MuscleMetabolicsProbe_MetabolicMuscleParameter glut_min3_r: ratio_slow_twitch_fibers=0.55
            use_provided_muscle_mass=false
        Umberger2010MuscleMetabolicsProbe_MetabolicMuscleParameter grac_r: ratio_slow_twitch_fibers=0.5
            use_provided_muscle_mass=false
        Umberger2010MuscleMetabolicsProbe_MetabolicMuscleParameter iliacus_r: ratio_slow_twitch_fibers=0.5
            use_provided_muscle_mass=false
        Umberger2010MuscleMetabolicsProbe_MetabolicMuscleParameter per_brev_r: ratio_slow_twitch_fibers=0.6
            use_provided_muscle_mass=false
        Umberger2010MuscleMetabolicsProbe_MetabolicMuscleParameter per_long_r: ratio_slow_twitch_fibers=0.6
            use_provided_muscle_mass=false
        Umberger2010MuscleMetabolicsProbe_MetabolicMuscleParameter peri_r: ratio_slow_twitch_fibers=0.5
            use_provided_muscle_mass=false
        Umberger2010MuscleMetabolicsProbe_MetabolicMuscleParameter psoas_r: ratio_slow_twitch_fibers=0.5
            use_provided_muscle_mass=false
        Umberger2010MuscleMetabolicsProbe_MetabolicMuscleParameter rect_fem_r: ratio_slow_twitch_fibers=0.3865
            use_provided_muscle_mass=false
        Umberger2010MuscleMetabolicsProbe_MetabolicMuscleParameter sar_r: ratio_slow_twitch_fibers=0.5
            use_provided_muscle_mass=false
        Umberger2010MuscleMetabolicsProbe_MetabolicMuscleParameter semimem_r: ratio_slow_twitch_fibers=0.4925
            use_provided_muscle_mass=false
        Umberger2010MuscleMetabolicsProbe_MetabolicMuscleParameter semiten_r: ratio_slow_twitch_fibers=0.425
            use_provided_muscle_mass=false
        Umberger2010MuscleMetabolicsProbe_MetabolicMuscleParameter soleus_r: ratio_slow_twitch_fibers=0.803
            use_provided_muscle_mass=false
        Umberger2010MuscleMetabolicsProbe_MetabolicMuscleParameter tfl_r: ratio_slow_twitch_fibers=0.5
            use_provided_muscle_mass=false
        Umberger2010MuscleMetabolicsProbe_MetabolicMuscleParameter tib_ant_r: ratio_slow_twitch_fibers=0.7
            use_provided_muscle_mass=false
        Umberger2010MuscleMetabolicsProbe_MetabolicMuscleParameter tib_post_r: ratio_slow_twitch_fibers=0.6
            use_provided_muscle_mass=false
        Umberger2010MuscleMetabolicsProbe_MetabolicMuscleParameter vas_int_r: ratio_slow_twitch_fibers=0.543
            use_provided_muscle_mass=false
        Umberger2010MuscleMetabolicsProbe_MetabolicMuscleParameter vas_lat_r: ratio_slow_twitch_fibers=0.455
            use_provided_muscle_mass=false
        Umberger2010MuscleMetabolicsProbe_MetabolicMuscleParameter vas_med_r: ratio_slow_twitch_fibers=0.503
            use_provided_muscle_mass=false
