# OpenSim document version 40000
AnalyzeTool analyze:
  model_file: post_simple_model_all_the_probes.osim
  replace_force_set: false
  results_directory: ./
  output_precision: 8
  initial_time: 0.631
  final_time: 1.778
  solve_for_equilibrium_for_auxiliary_states: false
  maximum_number_of_integrator_steps: 20000
  maximum_integrator_step_size: 1
  minimum_integrator_step_size: 1e-8
  integrator_error_tolerance: 1e-5
  states_file: muscleprescribewithemg_states.sto
  lowpass_cutoff_frequency_for_coordinates: -1
  AnalysisSet Analyses:
    MuscleAnalysis: start_time=-Inf end_time=Inf step_interval=1 in_degrees=true muscle_list=all
        moment_arm_coordinate_list=all compute_moments=false
    ProbeReporter: start_time=-Inf end_time=Inf step_interval=1 in_degrees=true
  ControllerSet Controllers:
    PrescribedController: controls_file=muscleprescribewithemg_controls.sto interpolation_method=1
