# OpenSim document version 40000
AnalyzeTool jr_analysis_100con:
  model_file: G:\Shared drives\Exotendon\muscleModel\muscleEnergyModel\..\results\welk002\welkexo\trial01\post_simple_model_all_the_probes_muscletrack.osim
  replace_force_set: false
  results_directory: ./
  output_precision: 8
  initial_time: 0.707
  final_time: 1.363
  solve_for_equilibrium_for_auxiliary_states: false
  maximum_number_of_integrator_steps: 20000
  maximum_integrator_step_size: 1
  minimum_integrator_step_size: 1e-8
  integrator_error_tolerance: 1e-5
  states_file: G:\Shared drives\Exotendon\muscleModel\muscleEnergyModel\..\results\welk002\welkexo\trial01\muscletrack_states_100con.sto
  lowpass_cutoff_frequency_for_coordinates: -1
  AnalysisSet Analyses:
    JointReaction Un-named analysis.: start_time=-Inf end_time=Inf step_interval=1 in_degrees=true joint_names=ALL
        apply_on_bodies=child express_in_frame=ground
  ControllerSet Controllers:
    PrescribedController: controls_file=(G:\Shared drives\Exotendon\muscleModel\muscleEnergyModel\..\results\welk002\welkexo\trial01\muscletrack_controls_100con.sto)
        interpolation_method=1
