# OpenSim document version 30000
IKTaskSet noloadwalkingstudy_trial01:
  # Upper-body markers (anatomical and tracking).
  IKMarkerTask C7: apply=true weight=5
  IKMarkerTask LAC: apply=true weight=5
  IKMarkerTask RAC: apply=true weight=5
  # Lower-body anatomical markers
  IKMarkerTask LASIS: apply=true weight=5
  IKMarkerTask RASIS: apply=true weight=5
  IKMarkerTask RWST: apply=true weight=5
  IKMarkerTask LWST: apply=true weight=5
  IKMarkerTask RIC: apply=true weight=5
  IKMarkerTask LIC: apply=true weight=5
  IKMarkerTask LPSIS: apply=true weight=5
  IKMarkerTask RPSIS: apply=true weight=5
  IKMarkerTask RTC: apply=true weight=12
  IKMarkerTask RLK: apply=true weight=10
  IKMarkerTask RLA: apply=true weight=7
  IKMarkerTask RLH: apply=true weight=10
  IKMarkerTask RLT: apply=true weight=5
  IKMarkerTask RDTip: apply=true weight=2
  # Lower-body tracking markers.
  IKMarkerTask RSLT: apply=true weight=1
  IKMarkerTask RSMT: apply=true weight=1
  IKMarkerTask RILT: apply=true weight=1
  IKMarkerTask RIMT: apply=true weight=1
  IKMarkerTask RSAS: apply=true weight=1
  IKMarkerTask RSPS: apply=true weight=1
  IKMarkerTask RIPS: apply=true weight=1
  IKMarkerTask RIAS: apply=true weight=1
