# OpenSim document version 30517
AnalyzeTool getMarkers:
  replace_force_set: false
  results_directory: Results_MarkerPositions
  output_precision: 8
  solve_for_equilibrium_for_auxiliary_states: false
  maximum_number_of_integrator_steps: 20000
  maximum_integrator_step_size: 1
  minimum_integrator_step_size: 1e-8
  integrator_error_tolerance: 1e-5
  external_loads_file: grf_walk.xml
  states_file: muscletrack_states.sto
  lowpass_cutoff_frequency_for_coordinates: -1
  AnalysisSet Analyses:
    OutputReporter: output_paths=(/markerset/C7|location /markerset/R_Shoulder|location /markerset/L_Shoulder|location /markerset/Sternum|location /markerset/r.ASIS|location /markerset/L.ASIS|location /markerset/r.PSIS|location /markerset/L.PSIS|location /markerset/R_HJC|location /markerset/L_HJC|location /markerset/r_thigh1|location /markerset/r_thigh2|location /markerset/r_thigh3|location /markerset/r_thigh4|location /markerset/r_thigh5|location /markerset/r_knee|location /markerset/r_shank_antsup|location /markerset/r_sh2|location /markerset/r_sh3|location /markerset/r_sh4|location /markerset/r_ankle|location /markerset/r_toe|location /markerset/r_5meta|location /markerset/r_calc|location /markerset/L_thigh1|location /markerset/L_thigh2|location /markerset/L_thigh3|location /markerset/L_thigh4|location /markerset/L_knee|location /markerset/L_ankle|location /markerset/L_shank_antsup|location /markerset/L_sh2|location /markerset/L_sh3|location /markerset/L_toe|location /markerset/L_5meta|location /markerset/L_calc|location /markerset/midASIS|location /markerset/R_5meta_proj|location /markerset/L_5meta_proj|location /markerset/R_toe_proj|location /markerset/L_toe_proj|location /markerset/L_AJC|location /markerset/L_AJC_proj|location /markerset/L_KJC|location /markerset/R_AJC|location /markerset/R_AJC_proj|location /markerset/R_KJC|location /markerset/midHJC|location /markerset/midPelvis|location /markerset/midPSIS|location)
        step_interval=1 in_degrees=true
