# OpenSim document version 30000
ScaleTool HOBLingApoorva-scaled:
  mass: 67 [kg]
  height: -1
  age: -1
  ModelScaler:
    apply: true
    scaling_order: measurements
    marker_file: G:/Shared drives/Exotendon/DATA/Subject7/OpenSim/Scaling/../../kinematics_emg/Edited/Files_W_HJCs/static1_VM.trc
    time_range: 0 1.79
    preserve_mass_distribution: true
    MeasurementSet:
      Measurement r_footX: apply=true
        MarkerPair: markers=(R_toe_proj R_AJC_proj)
        BodyScale talus_r: axes=X
        BodyScale calcn_r: axes=X
        BodyScale toes_r: axes=X
      Measurement l_footX: apply=true
        MarkerPair: markers=(L_toe_proj L_AJC_proj)
        BodyScale talus_l: axes=X
        BodyScale calcn_l: axes=X
        BodyScale toes_l: axes=X
      Measurement r_footZ: apply=true
        MarkerPair: markers=(r_ankle r_mankle)
        BodyScale talus_r: axes=Z
        BodyScale calcn_r: axes=Z
        BodyScale toes_r: axes=Z
      Measurement l_footZ: apply=true
        MarkerPair: markers=(L_ankle L_mankle)
        BodyScale talus_l: axes=Z
        BodyScale calcn_l: axes=Z
        BodyScale toes_l: axes=Z
      Measurement r_tibiaY: apply=true
        MarkerPair: markers=(R_AJC R_KJC)
        BodyScale tibia_r: axes=Y
      Measurement l_tibiaY: apply=true
        MarkerPair: markers=(L_AJC L_KJC)
        BodyScale tibia_l: axes=Y
      Measurement r_tibiaXZ: apply=true
        MarkerPair: markers=(r_mankle r_ankle)
        BodyScale tibia_r: axes=(X Z)
      Measurement l_tibiaXZ: apply=true
        MarkerPair: markers=(L_mankle L_ankle)
        BodyScale tibia_l: axes=(X Z)
      Measurement r_femurY: apply=true
        MarkerPair: markers=(RHJC_reg R_KJC)
        BodyScale femur_r: axes=Y
      Measurement l_femurY: apply=true
        MarkerPair: markers=(LHJC_reg L_KJC)
        BodyScale femur_l: axes=Y
      Measurement r_femurXZ: apply=true
        MarkerPair: markers=(r_knee r_mknee)
        BodyScale femur_r: axes=(X Z)
        BodyScale patella_r: axes=(X Y Z)
      Measurement l_femurXZ: apply=true
        MarkerPair: markers=(L_knee L_mknee)
        BodyScale femur_l: axes=(X Z)
        BodyScale patella_l: axes=(X Y Z)
      Measurement pelvisX: apply=true
        MarkerPair: markers=(midASIS midPSIS)
        BodyScale pelvis: axes=X
      Measurement pelvisY: apply=true
        MarkerPair: markers=(midHJC midPelvis)
        BodyScale pelvis: axes=Y
      Measurement pelvisZ: apply=true
        MarkerPair: markers=(RHJC_reg LHJC_reg)
        BodyScale pelvis: axes=Z
      Measurement torsoX: apply=true
        MarkerPair: markers=(C7 Sternum)
        BodyScale torso: axes=X
      Measurement torsoY: apply=true
        MarkerPair: markers=(midPSIS C7)
        BodyScale torso: axes=Y
      Measurement torsoZ: apply=true
        MarkerPair: markers=(R_Shoulder L_Shoulder)
        BodyScale torso: axes=Z
      Measurement r_upperarm_XZ: apply=false
        MarkerPair: markers=(R_elbow_lat R_elbow_med)
      Measurement l_upperarm_XZ: apply=false
        MarkerPair: markers=(L_elbow_lat L_elbow_med)
      Measurement r_upperarm_Y: apply=true
        MarkerPair: markers=(R_elbow_med R_Shoulder)
        BodyScale humerus_r: axes=(X Y Z)
      Measurement l_upperarm_Y: apply=true
        MarkerPair: markers=(L_elbow_med L_Shoulder)
        BodyScale humerus_l: axes=(X Y Z)
      Measurement r_lowerarm_XZ: apply=false
        MarkerPair: markers=(R_wrist_ulna R_wrist_radius)
      Measurement l_lowerarm_XZ: apply=false
        MarkerPair: markers=(L_wrist_ulna L_wrist_radius)
      Measurement r_lowerarm_Y: apply=true
        MarkerPair: markers=(R_elbow_med R_wrist_radius)
        BodyScale ulna_r: axes=(X Y Z)
        BodyScale radius_r: axes=(X Y Z)
      Measurement l_lowerarm_Y: apply=true
        MarkerPair: markers=(L_elbow_med L_wrist_radius)
        BodyScale ulna_l: axes=(X Y Z)
        BodyScale radius_l: axes=(X Y Z)
      Measurement r_ASIS_2_KJC: apply=false
        MarkerPair: markers=(r.ASIS R_KJC)
      Measurement l_ASIS_2_KJC: apply=false
        MarkerPair: markers=(L.ASIS L_KJC)
      Measurement pelvisZ_new: apply=false
        MarkerPair: markers=(r.ASIS L.ASIS)
  MarkerPlacer:
    apply: true
    marker_file: G:/Shared drives/Exotendon/DATA/Subject7/OpenSim/Scaling/../../kinematics_emg/Edited/Files_W_HJCs/static1_VM.trc
    time_range: 0
    max_marker_movement: -1
    IKTaskSet:
      IKMarkerTask C7: apply=true weight=0
      IKMarkerTask R_Shoulder: apply=true weight=10
      IKMarkerTask L_Shoulder: apply=true weight=10
      IKMarkerTask R_Sternum: apply=true weight=10
      IKMarkerTask L_Sternum: apply=true weight=10
      IKMarkerTask r_ASIS: apply=true weight=10
      IKMarkerTask L_ASIS: apply=true weight=10
      IKMarkerTask r_PSIS: apply=true weight=10
      IKMarkerTask L_PSIS: apply=true weight=10
      IKMarkerTask R_HJC: apply=false weight=20
      IKMarkerTask L_HJC: apply=false weight=10
      IKMarkerTask RHJC_reg: apply=true weight=15
      IKMarkerTask LHJC_reg: apply=true weight=15
      IKMarkerTask r_thigh1: apply=true weight=0
      IKMarkerTask r_thigh2: apply=true weight=0
      IKMarkerTask r_thigh3: apply=true weight=0
      IKMarkerTask r_thigh4: apply=true weight=0
      IKMarkerTask r_thigh5: apply=true weight=0
      IKMarkerTask r_knee: apply=true weight=10
      IKMarkerTask r_mknee: apply=true weight=10
      IKMarkerTask r_shank_antsup: apply=true weight=0
      IKMarkerTask r_sh2: apply=true weight=0
      IKMarkerTask r_sh3: apply=true weight=0
      IKMarkerTask r_ankle: apply=true weight=10
      IKMarkerTask r_mankle: apply=true weight=10
      IKMarkerTask r_toe: apply=true weight=10
      IKMarkerTask r_5meta: apply=true weight=10
      IKMarkerTask r_calc: apply=true weight=10
      IKMarkerTask L_thigh1: apply=true weight=0
      IKMarkerTask L_thigh2: apply=true weight=0
      IKMarkerTask L_thigh3: apply=true weight=0
      IKMarkerTask L_thigh4: apply=true weight=0
      IKMarkerTask L_knee: apply=true weight=10
      IKMarkerTask L_mknee: apply=true weight=10
      IKMarkerTask L_ankle: apply=true weight=10
      IKMarkerTask L_shank_antsup: apply=true weight=0
      IKMarkerTask L_sh2: apply=true weight=0
      IKMarkerTask L_sh3: apply=true weight=0
      IKMarkerTask L_mankle: apply=true weight=10
      IKMarkerTask L_toe: apply=true weight=10
      IKMarkerTask L_calc: apply=true weight=10
      IKMarkerTask L_5meta: apply=true weight=10
      IKMarkerTask midASIS: apply=true weight=0
      IKMarkerTask R_5meta_proj: apply=true weight=0
      IKMarkerTask L_5meta_proj: apply=true weight=0
      IKMarkerTask R_toe_proj: apply=true weight=0
      IKMarkerTask L_toe_proj: apply=true weight=0
      IKMarkerTask L_AJC: apply=true weight=15
      IKMarkerTask L_AJC_proj: apply=true weight=0
      IKMarkerTask L_KJC: apply=true weight=15
      IKMarkerTask R_AJC: apply=true weight=15
      IKMarkerTask R_AJC_proj: apply=true weight=0
      IKMarkerTask R_KJC: apply=true weight=15
      IKMarkerTask midHJC: apply=true weight=0
      IKMarkerTask midPelvis: apply=true weight=0
      IKMarkerTask midPSIS: apply=true weight=0
      IKMarkerTask r_band_shoe: apply=true weight=0
      IKMarkerTask L_band_shoe: apply=true weight=0
      IKMarkerTask R_elbow_medial: apply=false weight=5
      IKMarkerTask R_elbow_lateral: apply=false weight=5
      IKMarkerTask L_elbow_medial: apply=false weight=5
      IKMarkerTask L_elbow_lateral: apply=false weight=5
      IKMarkerTask L_wrist_medial: apply=false weight=5
      IKMarkerTask L_wrist_lateral: apply=false weight=5
      IKMarkerTask R_wrist_medial: apply=false weight=5
      IKMarkerTask R_wrist_lateral: apply=false weight=5
      IKCoordinateTask ankle_angle_r: apply=true weight=10 value_type=manual_value value=-0.08726646
      IKCoordinateTask ankle_angle_l: apply=true weight=10 value_type=manual_value value=-0.08726646
