# OpenSim document version 30000
MarkerSet:
  Marker RAC: torso (0.02 0.41 0.14) fixed=true
  Marker LAC: torso (0.02 0.41 -0.14) fixed=true
  Marker C7: torso (-0.055 0.465 0.0017) fixed=true
  Marker RASIS: pelvis (0.005 0.018 0.135) fixed=true
  Marker LASIS: pelvis (0.005 0.018 -0.135) fixed=true
  Marker RPSIS: pelvis (-0.155 0.035 0.035) fixed=true
  Marker LPSIS: pelvis (-0.155 0.035 -0.035) fixed=true
  Marker RHJC: pelvis (-0.0563 -0.0785 0.07726) fixed=true
  Marker RSLT: femur_r (0.07 -0.15 0.04)
  Marker RSMT: femur_r (0.07 -0.15 -0.01)
  Marker RIMT: femur_r (0.07 -0.2 -0.01)
  Marker RLK: femur_r (0 -0.404 0.05) fixed=true
  Marker RMK: femur_r (0 -0.404 -0.05) fixed=true
  Marker RKJC: tibia_r (0.001731 -0.002389 -0.008452) fixed=true
  Marker RSPS: tibia_r (-0.025 -0.195 0.05)
  Marker RSAS: tibia_r (0.025 -0.195 0.05)
  Marker RIAS: tibia_r (0.025 -0.245 0.05)
  Marker RLA: tibia_r (-0.005 -0.3888 0.053) fixed=true
  Marker RMA: tibia_r (0.006 -0.3888 -0.038) fixed=true
  Marker RAJC: talus_r (0 0 0) fixed=true
  Marker RMT: calcn_r (0.19 0.01 -0.05) fixed=true
  Marker RLT: calcn_r (0.16 0.02 0.05) fixed=true
  Marker MidAC: torso (0.02 0.41 0) fixed=true
  Marker RIC: pelvis (-0.069 0.09 0.135) fixed=true
  Marker LIC: pelvis (-0.069 0.09 -0.135) fixed=true
  Marker MidIC: pelvis (-0.069 0.09 0) fixed=true
  Marker RWST: pelvis (-0.029 0.066 0.14) fixed=true
  Marker LWST: pelvis (-0.029 0.066 -0.14) fixed=true
  Marker MidASIS: pelvis (0.005 0.018 0) fixed=true
  Marker MidPSIS: pelvis (-0.155 0.035 0) fixed=true
  Marker MidPELV: pelvis (-0.075 0.0265 0) fixed=true
  Marker RHJC_P: pelvis (-0.0563 0.09 0.07726) fixed=true
  Marker RTC: femur_r (-0.01 -0.015 0.085) fixed=true
  Marker LTC: pelvis (-0.066276 -0.09349 -0.16226) fixed=true
  Marker MidTC: pelvis (-0.066276 -0.09349 0) fixed=true
  Marker RILT: femur_r (0.07 -0.2 0.04)
  Marker RIPS: tibia_r (-0.025 -0.245 0.05)
  Marker RLH: calcn_r (0.03 0.02 0.05) fixed=true
  Marker RAJC_P: calcn_r (0.04877 -0.0051348 -0.00792004) fixed=true
  Marker RDTip: toes_r (0 0.022 -0.018) fixed=true
  Marker RLT_P: toes_r (-0.0188 -0.0031348 0.04892) fixed=true
  Marker RMT_P: toes_r (0.0112 -0.0031348 -0.05108) fixed=true
  Marker RMidT_P: toes_r (-0.0038 -0.0031348 -0.00108) fixed=true
  Marker RDAC: calcn_r (-0.025 0.05 -0.005)
  Marker RPAC: tibia_r (-0.08377 -0.26695 0.00292)
